variable potential_type getenv "MD_POTENTIAL_TYPE"
variable structure_data_file getenv "MD_STRUCTURE_DATA_FILE"
variable target_temperature getenv "MD_TARGET_TEMPERATURE"
variable volume_scale getenv "MD_VOLUME_SCALE"
variable deepmd_model_file getenv "MD_DEEPMD_MODEL_FILE"

log minimize_amorphous_structure_${target_temperature}k_${volume_scale}.log

units metal
atom_style atomic
boundary p p p

if "${potential_type} == KIM" then &
  "kim init Sim_LAMMPS_ModifiedTersoff_PurjaPunMishin_2017_Si__SM_184524061456_000 metal"

variable size_scale equal ${volume_scale}^(1/3)

read_data ${structure_data_file}

if "${potential_type} == KIM" then &
  "kim interactions Si" &
else &
  "pair_style deepmd ${deepmd_model_file}" &
  "pair_coeff * *"

neigh_modify every 1 check yes
mass 1 28.0855

timestep 0.0005

compute atom_potential_energy all pe/atom
compute total_potential_energy all reduce sum c_atom_potential_energy

thermo 10
thermo_style custom step temp lx ly lz press pxx pyy pzz c_total_potential_energy c_thermo_pe

fix 1 all deform 1 &
  x scale ${size_scale} &
  y scale ${size_scale} &
  z scale ${size_scale} &
  remap x &
  remap v &
  units box

run 100000
unfix 1

velocity all create ${target_temperature} 32222 mom yes rot yes dist gaussian
fix 2 all nvt temp ${target_temperature} ${target_temperature} $(80.0 * dt)
fix 3 all ave/time 100 1000 100000 c_total_potential_energy
run 100000

variable total_potential_energy equal "f_3"
variable total_atoms equal "count(all)"
variable cohesive_energy equal "v_total_potential_energy / v_total_atoms"
variable final_volume equal "vol / v_total_atoms"

print "Total energy (eV) = ${total_potential_energy}"
print "Cohesive energy (eV) = ${cohesive_energy}"
print "Final volume (angstrom^3) = ${final_volume}"

unfix 2
unfix 3
